# NOTE: This script can be modified for different pair styles
# See in.elastic for more info.

# Choose potential
pair_style      reax/c NULL safezone 50.0 mincap 100000
pair_coeff      * * ${locs}/ffield.reax.2 H C N O #C F
fix             2 all qeq/reax 1 0.0 10.0 1e-6 reax/c

# Setup neighbor style
neighbor        2.0 bin   # Might have to redefine after restart
neigh_modify    every 1 delay 0 check no  # Might have to redefine after restart

#kspace_style    pppm 0.0001   # Might have to redefine after restart


#  Setting to display thermodynamical information on the system every 500 steps
thermo          500

#  Setting the type of thermodynamical information to be printed: T, P, energies, dimesions, V, stress tensor
thermo_style    custom step cpu temp press pe ke evdwl ecoul epair ebond eangle edihed lx ly lz vol pxx pyy pzz pxy pxz pyz

#  Setting the syntax of the printed thermodynamical information
thermo_modify   flush yes line multi format float %g format 3 %15.8g

#  Printing evolution of stress for comparison
variable pt equal "step"
variable pp equal "press"
variable p0 equal "pxx"
variable p1 equal "pyy"
variable p2 equal "pzz"
variable p3 equal "pe"
variable p4 equal "ke"
variable p5 equal "temp"
variable p6 equal "lx"
variable p7 equal "ly"
variable p8 equal "lz"
variable p9 equal "vol"

#  Compute current stress using sampling over time and fixed NVT conditions
#fix 1e all print 1 "${pt} ${pp} ${p0} ${p1} ${p2} ${p3} ${p4} ${p5} ${p6} ${p7} ${p8} ${p9}" file ${loco}/PE_elastic_${dir}_${ori}_evol.dat screen no
